# Лабораторна робота №2
# Білоус Артур
# 143А(1)
# Варіант 1
# ЗАВДАННЯ 1
X*A == B
# а)
A := [2, -1, -3; 8, -7, -6; -3, 4, 2]
B := [2, -1, 2; -3, -5, 4; 1, 2, 1]
X := B*A^-1 = [-2.66667, 1.66667, 2; -0.266667, -2.33333, -5.4; -1.66667, 1.66667, 3]
# :
Перевірка
X*A = [2, -1, 2; -3, -5, 4; 1, 2, 1]
B = [2, -1, 2; -3, -5, 4; 1, 2, 1]
# перевірку виконано
A*X*B == E
# б)
E := [1, 0, 0; 0, 1, 0; 0, 0, 1]
X1 := A^-1*E*B^-1 = [-0.352381, 0.238095, 0.752381; -0.0933333, 0.133333, 0.453333; -0.327619, 0.161905, 0.407619]
Перевірка
A*X1*B = [1, 0, 0; 0, 1, 0; 0, 0, 1]
# перевірку виконано
A := 0
B := 0
X := 0
X1 := 0
# ЗАВДАННЯ 2
# 2.1)
A := [2, 1, 4, 3; 3, -1, 0, 2; -2, 1, 4, 1; 3, 1, 2, -5]
B := [9; 4; 5; 6]
Ar := augment(A, B) = [2, 1, 4, 3, 9; 3, -1, 0, 2, 4; -2, 1, 4, 1, 5; 3, 1, 2, -5, 6]
rank(A) = 4
rank(Ar) = 4
# rank(A)=rank(Ar), система сумісна та r=n
# 2.2) а)
X := A^-1*B = [1; -1; 2; 0]
# перевірка
A*X = [9; 4; 5; 6]
B := [9; 4; 5; 6]
# перевірку виконано
# 2.2) б)
ORIGIN := 1
Δ := |A| = 116
Δ1 := |augment(B, A[:, 2], A[:, 3], A[:, 4])| = 116
Δ2 := |augment(A[:, 1], B, A[:, 3], A[:, 4])| = -116
Δ3 := |augment(A[:, 1], A[:, 2], B, A[:, 4])| = 232
Δ4 := |augment(A[:, 1], A[:, 2], A[:, 3], B)| = 0
x1 := Δ1/Δ = 1
x1 := Δ2/Δ = -1
x1 := Δ3/Δ = 2
x1 := Δ4/Δ = 0
# перевірка
A*X = [9; 4; 5; 6]
B := [9; 4; 5; 6]
# перевірку виконано
# ЗАВДАННЯ 3
N := 1
# X1 костюми
50*X1 + 10*X2 + 30*X3 == 177
# X2 плащі
35*X1 + 25*X2 + 20*X3 == 170
# X3 куртки
40*X1 + 20*X2 + 30*X3 == 185
A := [50, 10, 30; 35, 25, 20; 40, 20, 30]
B := [176 + N; 168 + 2*N; 184 + N]
# X1=1.867
X := A^-1*B = [1.86667; 2.66667; 1.9]  # X2=2.667
# X3=1.9
# Відповідь: костюм - 1.867 тис, плащ - 2.667 тис, куртка - 1.9 тис.
# Перевірка
A*X = [177; 170; 185]
B = [177; 170; 185]
# ПЕРЕВІРКУ ВИКОНАНО
