# Лабораторна робота №3
# 143А(1)
# Білоус Артур
# 1 варіант
ORIGIN := 1
k := 1
# Завдання 1
# 1.1 | Координати векторів
A := [k; k; 2 - 2*k]
C := [0; 5 + k; -2*k]
B := [2*k; k; -2*k]
D := [k; 0; -3*k]
a := B - A = [1; 0; -2]
b := C - A = [-1; 5; -2]
c := D - A = [0; -1; -3]
d := B - D = [1; 1; 1]
# 1.2 Довжина векторів
|a| → sqrt(5)
|c| → sqrt(10)
|b| → sqrt(30)
|d| → sqrt(3)
# 1.3 Скалярний добуток векторів
scal := a*b → 3
# 1.4 Векторний добуток
vec := a×b → [10; 4; 5]
# 1.5 Косинус та синус між векторами
sinφ := |vec|/(|a|*|b|) → sqrt(5)*sqrt(30)*sqrt(141)/150
cosφ := scal/(|a|*|b|) → sqrt(5)*sqrt(30)/50
# 1.6 Мішаний добуток векторів
mish_d := (a×b)*c → -19
if((a×b)*c == 0, компланарні, некомпланарні) → некомпланарні
# Утворюють ліву трійку, мішаний добуток < 0
# Завдання 2
m := [0; -1; 3*k] = [0; -1; 3]
n := [4; 2*k; -3] = [4; 2; -3]
a := 3*m - 4*n = [-16; -11; 21]
b := m + 2*n = [8; 3; -3]
if(a[1, 1]/b[1, 1] == a[2, 1]/b[2, 1] == a[3, 1]/b[3, 1], коленіарні, неколеніарні) → неколеніарні
if(a*b == 0, ортогональні, неортогональні) → неортогональні
# Завдання 3
a := B - A = [1; 0; -2]
b := C - A = [-1; 5; -2]
# Площа паралелограма
|a×b| → sqrt(141)
# Завдання 4
# Об'єм піраміди
V := 1/6*|(a×b)*c| → 19/6
# Завдання 5
p := [1; 0; 2]
q := [-2; 1; 0]
r := [2; -1; 1]
x := [0; -1; 2]
if((p×q)*r == 0, коленіарні, неколеніарні) → неколеніарні
# оскільки три вектори не коленіарні, вони утворюють базис у трьохвимірному просторі
x == t1*p + t2*q + t3*r solve, t1, t2, t3 → [-2, 5, 6]
