# Лабораторна робота №3
# Тарновецький Станіслав
# 6 варіант
ORIGIN := 1
k := 6
# 1 ЗАВДАННЯ
# 1.1 | Координати векторів
A := [k; k; 2 - 2*k]
C := [0; 5 + k; -2*k]
B := [2*k; k; -2*k]
D := [k; 0; -3*k]
a := B - A = [6; 0; -2]
b := C - A = [-6; 5; -2]
c := D - A = [0; -6; -8]
d := B - D = [6; 6; 6]
# 1.2 Довжина векторів
|a| → 2*sqrt(10)
|c| → 10
|b| → sqrt(65)
|d| → 6*sqrt(3)
# 1.3 Скалярний добуток векторів
scal := a*b → -32
# 1.4 Векторний добуток
vec := a×b → [10; 24; 30]
# 1.5 Косинус та синус між векторами
sinφ := |vec|/(|a|*|b|) → sqrt(10)*sqrt(65)*sqrt(394)/650
cosφ := scal/(|a|*|b|) → -8*sqrt(10)*sqrt(65)/325
# 1.6 Мішаний добуток векторів
mish_d := (a×b)*c → -384
if((a×b)*c == 0, компланарні, некомпланарні) → некомпланарні
# Утворюють ліву трійку, мішаний добуток < 0
# 2 ЗАВДАННЯ
m := [0; -1; 3*k] = [0; -1; 18]
n := [4; 2*k; -3] = [4; 12; -3]
a := 3*m - 4*n = [-16; -51; 66]
b := m + 2*n = [8; 23; 12]
if(a[1, 1]/b[1, 1] == a[2, 1]/b[2, 1] == a[3, 1]/b[3, 1], коленіарні, неколеніарні) → неколеніарні
if(a*b == 0, ортогональні, неортогональні) → неортогональні
# 3 ЗАВДАННЯ
a := B - A = [6; 0; -2]
b := C - A = [-6; 5; -2]
# Площа трикутника
0.5*|a×b| → 1.0*sqrt(394)
# 4 ЗАВДАННЯ
# Об'єм піраміди
V := 1/6*|(a×b)*c| → 64
# 5 ЗАВДАННЯ
p := [-1; 3; -4]
q := [1; -1; 6]
r := [0; -5; 1]
x := [1; -4; 9]
if((p×q)*r == 0, коленіарні, неколеніарні) → неколеніарні
# оскільки три вектори не коленіарні, вони утворюють базис у трьохвимірному просторі
x == t1*p + t2*q + t3*r solve, t1, t2, t3 → [1, 2, 1]
