# Лабораторна робота №3
# Тарновецький Станіслав
# 17 варіант
ORIGIN := 1
k := 17
# 1 ЗАВДАННЯ
# 1.1 | Координати векторів
A := [k; k; 2 - 2*k]
C := [0; 5 + k; -2*k]
B := [2*k; k; -2*k]
D := [k; 0; -3*k]
a := B - A = [17; 0; -2]
b := C - A = [-17; 5; -2]
c := D - A = [0; -17; -19]
d := B - D = [17; 17; 17]
# 1.2 Довжина векторів
|a| → sqrt(293)
|c| → 5*sqrt(26)
|b| → sqrt(318)
|d| → 17*sqrt(3)
# 1.3 Скалярний добуток векторів
scal := a*b → -285
# 1.4 Векторний добуток
vec := a×b → [10; 68; 85]
# 1.5 Косинус та синус між векторами
sinφ := |vec|/(|a|*|b|) → sqrt(293)*sqrt(318)*sqrt(11949)/93174
cosφ := scal/(|a|*|b|) → -95*sqrt(293)*sqrt(318)/31058
# 1.6 Мішаний добуток векторів
mish_d := (a×b)*c → -2771
if((a×b)*c == 0, компланарні, некомпланарні) → некомпланарні
# Утворюють ліву трійку, мішаний добуток < 0
# 2 ЗАВДАННЯ
m := [0; -1; 3*k] = [0; -1; 51]
n := [4; 2*k; -3] = [4; 34; -3]
a := 3*m - 4*n = [-16; -139; 165]
b := m + 2*n = [8; 67; 45]
if(a[1, 1]/b[1, 1] == a[2, 1]/b[2, 1] == a[3, 1]/b[3, 1], коленіарні, неколеніарні) → неколеніарні
if(a*b == 0, ортогональні, неортогональні) → неортогональні
# 3 ЗАВДАННЯ
a := B - A = [17; 0; -2]
b := C - A = [-17; 5; -2]
# Площа паралелограма
|a×b| → sqrt(11949)
# 4 ЗАВДАННЯ
# Об'єм піраміди
V := 1/6*|(a×b)*c| → 2771/6
# 5 ЗАВДАННЯ
p := [0; 2; -1]
q := [2; 5; 0]
r := [3; -9; 7]
x := [1; 2; -1]
if((p×q)*r == 0, коленіарні, неколеніарні) → неколеніарні
# оскільки три вектори не коленіарні, вони утворюють базис у трьохвимірному просторі
x == t1*p + t2*q + t3*r solve, t1, t2, t3 → [8, -1, 1]
