# Лабораторна робота №2
# Назар Кавун
# 143
# Варіант 9
# ЗАВДАННЯ 1
X*A == B
# а)
A := [1, 7, 3; -4, 9, 4; 0, 3, 2]
B := [6, 5, 2; 1, 9, 2; 4, 5, 2]
X := B*A^-1 = [2, -1, 0; 2.07692, 0.269231, -2.65385; 1.53846, -0.615385, -0.0769231]
ПЕРЕВІРКА
X*A = [6, 5, 2; 1, 9, 2; 4, 5, 2]
B = [6, 5, 2; 1, 9, 2; 4, 5, 2]
# перевірку виконано
A*X*B == E
# б)
E := [1, 0, 0; 0, 1, 0; 0, 0, 1]
X1 := A^-1*E*B^-1 = [-0.03125, -0.0721154, 0.122596; 1.375, 0.403846, -2.08654; -3.03125, -0.918269, 4.66106]
Перевірка
A*X1*B = [1, -1.28786e-14, 0; 0, 1, 0; 0, 0, 1]
# перевірку виконано
A := 0
B := 0
X := 0
X1 := 0
# ЗАВДАННЯ 2
# 2.1)
A := [2, 1, -1, 2; 3, 2, 1, -2; 1, -1, 2, 2; -1, 2, -1, -1]
B := [1; -8; 1; 2]
Ar := augment(A, B) = [2, 1, -1, 2, 1; 3, 2, 1, -2, -8; 1, -1, 2, 2, 1; -1, 2, -1, -1, 2]
rank(A) = 4
rank(Ar) = 4
# Оскільки rank(A)=rank(Ar), система сумісна та r=n, отже система має єдиний розв'язок
# 2.2) а)
X := A^-1*B = [-2; 1; 0; 2]
# перевірка
A*X = [1; -8; 1; 2]
B := [1; -8; 1; 2]
# перевірку виконано
# 2.2) б)
ORIGIN := 1
Δ := |A| = 54
Δ1 := |augment(B, A[:, 2], A[:, 3], A[:, 4])| = -108
Δ2 := |augment(A[:, 1], B, A[:, 3], A[:, 4])| = 54
Δ3 := |augment(A[:, 1], A[:, 2], B, A[:, 4])| = 0
Δ4 := |augment(A[:, 1], A[:, 2], A[:, 3], B)| = 108
x1 := Δ1/Δ = -2
x1 := Δ2/Δ = 1
x1 := Δ3/Δ = 0
x1 := Δ4/Δ = 2
# перевірка
A*X = [1; -8; 1; 2]
B := [1; -8; 1; 2]
# перевірку виконано
# ЗАВДАННЯ 3
N := 9
# X1 костюми
50*X1 + 10*X2 + 30*X3 == 185
# X2 плащі
35*X1 + 25*X2 + 20*X3 == 186
# X3 куртки
40*X1 + 20*X2 + 30*X3 == 193
A := [50, 10, 30; 35, 25, 20; 40, 20, 30]
B := [176 + N; 168 + 2*N; 184 + N]
# X1=2.4
# костюм - 2.4 тис
# плащ - 3.2 тис
# куртка - 1.1 тис.
X := A^-1*B = [2.4; 3.2; 1.1]  # X2=3.2
# X3=1.1
# Перевіримо
A*X = [185; 186; 193]
B = [185; 186; 193]
# ПЕРЕВІРКУ ВИКОНАНО
